*Heading
** Reconstructed paper-consistent cyclic dogbone RNO model
** SI units: m, kg, s, Pa, K
** Axial direction is global 3; report S33, not S11.
*Preprint, echo=NO, model=NO, history=NO, contact=NO
*Part, name=DOGBONE
*Node
1, -5.000000000000e-04, -2.500000000000e-03, 0.000000000000e+00
2, 0.000000000000e+00, -2.500000000000e-03, 0.000000000000e+00
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*Element, type=C3D8RT, elset=ALL_ELEMENTS
1, 1, 2, 5, 4, 22, 23, 26, 25
2, 2, 3, 6, 5, 23, 24, 27, 26
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*Nset, nset=ALL_NODES, generate
1, 1197, 1
*Nset, nset=BOTTOM
1, 2, 3, 4, 5, 6
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*Nset, nset=TOP
1177, 1178, 1179, 1180, 1181, 1182
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*Nset, nset=GAUGE
295, 296, 297, 298, 299, 300
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*Solid Section, elset=ALL_ELEMENTS, material=POLYUREA_RNO
,
*End Part
*Assembly, name=ASSEMBLY
*Instance, name=DOGBONE-1, part=DOGBONE
*End Instance
*End Assembly
*Material, name=POLYUREA_RNO
*Density
1120.
*Specific Heat
1500.
*Conductivity
0.19
*Inelastic Heat Fraction
0.9
*Depvar
33,
*User Material, constants=9
2.82e9, 0.286, 0., 0., 0., 0., 0., 6.0e-5
1.0
*Initial Conditions, type=TEMPERATURE
DOGBONE-1.ALL_NODES, 300.
*Boundary
DOGBONE-1.BOTTOM, 1, 3, 0.
*Amplitude, name=CYCLIC_DISPLACEMENT, definition=TABULAR, time=TOTAL TIME
0.000000000000e+00, 0.000000000000e+00
1.000000000000e-07, 1.933592837090e-04
2.000000000000e-07, 1.536593384701e-03
3.000000000000e-07, 5.128596085677e-03
4.000000000000e-07, 1.196825882541e-02
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6.000000000000e-05, -7.347880794884e-16
*Step, name=CYCLIC, nlgeom=YES
*Dynamic, Explicit
, 6.0e-5
*Bulk Viscosity
0.06, 1.2
*Boundary, amplitude=CYCLIC_DISPLACEMENT
DOGBONE-1.TOP, 3, 3, 2.0e-5
*Output, field, time interval=1.0e-6
*Node Output
U, V, A, RF, NT
*Element Output, directions=YES
S, LE, SDV, TEMP, ENER
*Output, history, time interval=1.0e-7
*Energy Output
ALLIE, ALLKE, ALLSE, ALLPD, ALLWK, ETOTAL
*Node Output, nset=DOGBONE-1.TOP
U3, RF3, NT
*Node Output, nset=DOGBONE-1.GAUGE
U3, NT
*End Step
