*Heading
** Reconstructed paper-consistent plate impact RNO model
** SI units: m, kg, s, Pa, K
** Plate: 40 x 40 x 10 mm; projectile: 10 x 10 x 20 mm at -20 m/s.
** Opposite (z=0) face fully clamped; impact surface is z=10 mm.
*Preprint, echo=NO, model=NO, history=NO, contact=NO
*Part, name=PLATE
*Node
1, -2.000000000000e-02, -2.000000000000e-02, 0.000000000000e+00
2, -1.885714285714e-02, -2.000000000000e-02, 0.000000000000e+00
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*Element, type=C3D8RT, elset=ALL_ELEMENTS
1, 1, 2, 38, 37, 505, 506, 542, 541
2, 2, 3, 39, 38, 506, 507, 543, 542
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*Nset, nset=ALL_NODES, generate
1, 6048, 1
*Nset, nset=BACK
1, 2, 3, 4, 5, 6
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*Nset, nset=CENTER_FRONT
5778, 5779, 5814, 5815
*Elset, elset=TOP_ELEMENTS
4551, 4552, 4553, 4554, 4555, 4556
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*Surface, type=ELEMENT, name=IMPACT_FACE
TOP_ELEMENTS, S2
*Solid Section, elset=ALL_ELEMENTS, material=POLYUREA_RNO
,
*End Part
*Part, name=IMPACTOR
*Node
10001, -5.000000000000e-03, -5.000000000000e-03, 1.000000000000e-02
10002, 0.000000000000e+00, -5.000000000000e-03, 1.000000000000e-02
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*Element, type=C3D8R, elset=ALL_ELEMENTS
10001, 10001, 10002, 10005, 10004, 10010, 10011, 10014, 10013
10002, 10002, 10003, 10006, 10005, 10011, 10012, 10015, 10014
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*Nset, nset=ALL_NODES, generate
10001, 10234, 1
*Elset, elset=BOTTOM_ELEMENTS
10001, 10002, 10003, 10004
*Surface, type=ELEMENT, name=CONTACT_FACE
BOTTOM_ELEMENTS, S1
*Solid Section, elset=ALL_ELEMENTS, material=STEEL
,
*End Part
*Assembly, name=ASSEMBLY
*Instance, name=PLATE-1, part=PLATE
*End Instance
*Instance, name=IMPACTOR-1, part=IMPACTOR
*End Instance
*End Assembly
*Material, name=POLYUREA_RNO
*Density
1120.
*Specific Heat
1500.
*Conductivity
0.19
*Inelastic Heat Fraction
0.9
*Depvar
33,
*User Material, constants=9
2.82e9, 0.286, 0., 0., 0., 0., 0., 3.0e-4
1.0
*Material, name=STEEL
*Density
7850.
*Elastic
210.e9, 0.3
*Surface Interaction, name=HARD_FRICTIONLESS
*Surface Behavior, pressure-overclosure=HARD
*Initial Conditions, type=TEMPERATURE
PLATE-1.ALL_NODES, 300.
*Initial Conditions, type=VELOCITY
IMPACTOR-1.ALL_NODES, 3, -20.
*Boundary
PLATE-1.BACK, 1, 3, 0.
*Step, name=IMPACT, nlgeom=YES
*Dynamic, Explicit
, 3.0e-4
*Bulk Viscosity
0.06, 1.2
*Contact Pair, interaction=HARD_FRICTIONLESS
IMPACTOR-1.CONTACT_FACE, PLATE-1.IMPACT_FACE
*Output, field, time interval=5.0e-6
*Node Output
U, V, A, RF, NT
*Element Output, directions=YES
S, LE, SDV, TEMP, ENER
*Output, history, time interval=1.0e-6
*Energy Output
ALLIE, ALLKE, ALLSE, ALLPD, ALLWK, ETOTAL
*Node Output, nset=PLATE-1.CENTER_FRONT
U3, V3, A3, NT
*Node Output, nset=PLATE-1.BACK
RF3
*End Step
