*Heading
** Reconstructed paper-consistent Taylor impact RNO model
** SI units: m, kg, s, Pa, K
** Projectile: 30 mm high, nominal 10 mm diameter, -100 m/s in direction 3.
*Preprint, echo=NO, model=NO, history=NO, contact=NO
*Part, name=PROJECTILE
*Node
1, -3.535533905933e-03, -3.535533905933e-03, 0.000000000000e+00
2, -2.946278254944e-03, -4.039733214514e-03, 0.000000000000e+00
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*Element, type=C3D8RT, elset=ALL_ELEMENTS
1, 1, 2, 15, 14, 222, 223, 236, 235
2, 2, 3, 16, 15, 223, 224, 237, 236
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*Nset, nset=ALL_NODES, generate
1, 4641, 1
*Elset, elset=BOTTOM_ELEMENTS
1, 2, 3, 4, 5, 6
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*Surface, type=ELEMENT, name=IMPACT_FACE
BOTTOM_ELEMENTS, S1
*Solid Section, elset=ALL_ELEMENTS, material=POLYUREA_RNO
,
*End Part
*Part, name=WALL
*Node
10001, -1.000000000000e-02, -1.000000000000e-02, -5.000000000000e-03
10002, -9.090909090909e-03, -1.000000000000e-02, -5.000000000000e-03
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*Element, type=C3D8R, elset=ALL_ELEMENTS
10001, 10001, 10002, 10025, 10024, 10070, 10071, 10094, 10093
10002, 10002, 10003, 10026, 10025, 10071, 10072, 10095, 10094
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*Nset, nset=ALL_NODES, generate
10001, 10207, 1
*Elset, elset=TOP_ELEMENTS
10045, 10046, 10047, 10048, 10049, 10050
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*Surface, type=ELEMENT, name=CONTACT_FACE
TOP_ELEMENTS, S2
*Solid Section, elset=ALL_ELEMENTS, material=STEEL
,
*End Part
*Assembly, name=ASSEMBLY
*Instance, name=PROJECTILE-1, part=PROJECTILE
*End Instance
*Instance, name=WALL-1, part=WALL
*End Instance
*End Assembly
*Material, name=POLYUREA_RNO
*Density
1120.
*Specific Heat
1500.
*Conductivity
0.19
*Inelastic Heat Fraction
0.9
*Depvar
33,
*User Material, constants=9
2.82e9, 0.286, 0., 0., 0., 0., 0., 2.0e-5
1.0
*Material, name=STEEL
*Density
7850.
*Elastic
210.e9, 0.3
*Surface Interaction, name=HARD_FRICTIONLESS
*Surface Behavior, pressure-overclosure=HARD
*Initial Conditions, type=TEMPERATURE
PROJECTILE-1.ALL_NODES, 300.
*Initial Conditions, type=VELOCITY
PROJECTILE-1.ALL_NODES, 3, -100.
*Boundary
WALL-1.ALL_NODES, 1, 3, 0.
*Step, name=IMPACT, nlgeom=YES
*Dynamic, Explicit
, 2.0e-5
*Bulk Viscosity
0.06, 1.2
*Contact Pair, interaction=HARD_FRICTIONLESS
PROJECTILE-1.IMPACT_FACE, WALL-1.CONTACT_FACE
*Output, field, time interval=1.0e-6
*Node Output
U, V, A, RF, NT
*Element Output, directions=YES
S, LE, SDV, TEMP, ENER
*Output, history, time interval=2.0e-7
*Energy Output
ALLIE, ALLKE, ALLSE, ALLPD, ALLWK, ETOTAL
*Node Output, nset=WALL-1.ALL_NODES
RF3
*End Step
